finish,
/clear,start

/inp,parameters,inp

/filn,%dbname%_nl,1
/out,,prot

/inp,buttons/buttons,inp
/inp,geo,inp

! update geometry
alls
upgeom,upgeom1_fact,1,upgeom1_subst,%dbname%,rst

alls
upgeom,upgeom2_fact,1,upgeom2_subst,%dbname%,rst


! static analysis
/solu
anty,static

! nonlinear controls
outres,all,all
nlgeom,on
arclen,on,arc_max,arc_min
nsubst,num_subst

! apply force on top
time,force_load*load_factor/1e3
nsel,,loc,z,ll-1,ll+1
*get,num_node,node,,count
f,all,fz,-force_load*load_factor/num_node

alls
solve
save,,db

/post1
set,last
plns,u,sum

/ang,1
/auto,1
/view,1,1,1,1
/rep
/ui,copy,save,emf,graph,color,reverse,no,100
