finish,
/clear,start
/filn,zylinder,1
/out,,prot

/inp,buttons,inp

inc = 1
rr = 1000   ! Radius Schale
aa = 30 		! Amplitude Wellblech
ll = 10000	! Länge der Schale

/prep7
clocal,11,1
csys,11

k,1,
k,2,,,ll
l,1,2

idx = 3
*do,ii,0,360-inc,inc
	k,idx,rr+aa*sin(0.5*ii),ii,0
	*if,idx,gt,3,then
		l,idx-1,idx
	*endif
	idx = idx + 1
*enddo

lsel,all
adrag,all,,,,,,1

lsel,,loc,z,ll/2
lsel,u,line,,1
lesize,all,,,100

et,1,shell281


alls
esize,100
amesh,all

alls
eplo
